# Grandezas-----------------------------------------------------------------------------------------------------------------------
# --------------------------------------------------------------------------------------------------------------------------------------
NANO := 10^-9
MICRO := 10^-6
MILI := 10^-3
QUILO := 10^3
MEGA := 10^6
GIGA := 10^9
# Variaveis--------------------------------------------------------------------------------------------------------------------------
# --------------------------------------------------------------------------------------------------------------------------------------
Lo := 3*MILI
Fs := 15*QUILO
ILop := 300
ILoef := 240
ΔILo := 1
KLo := 0.7
BLo := 0.35
JLo := 450
Ve := 12
μo := 4*π*10^-7
# Escolha_Nucleo-------------------------------------------------------------------------------------------------------------------
ΔBLo := BLo*(ΔILo/ILop)
ΔBLo = 0.00116667
AeAw := (Lo*ILop*ILoef*10^4)/(KLo*BLo*JLo)
AeAw = 19591.8
Lin_E20 := 0
Lin_E30_7 := 1
Lin_E30_14 := 2
Lin_42_15 := 3
Lin_42_20 := 4
Lin_E55 := 5
Col_Ae := 0
Col_Aw := 1
Col_Ie := 2
Col_It := 3
Col_Ve := 4  # Col_AeAw
TabelaNucleo := [
    0.312, 0.26, 4.28, 3.8, 1.34, 0.08;
    0.60, 0.80, 6.7, 5.6, 4.00, 0.48;
    1.20, 0.85, 6.7, 6.7, 8.00, 1.02;
    1.81, 1.57, 9.7, 8.7, 17.10, 2.84;
    2.40, 1.57, 9.7, 10.5, 23.30, 3.77;
    3.54, 2.50, 1.2, 11.6, 42.50, 8.85
]
NucleoEscolhido := Lin_E30_14
Ae := TabelaNucleo[NucleoEscolhido, Col_Ae]
Aw := TabelaNucleo[NucleoEscolhido, Col_Aw]
# Cálculo_Número_Espiras------------------------------------------------------------------------------------------------------
NumeroEspiras := (Lo*ILop*10^4)/(BLo*Ae)
NumeroEspiras = 21428.6
# Cálculo_Entreferro------------------------------------------------------------------------------------------------------
lg := (NumeroEspiras^2*μo*Ae*10^-2)/Lo
lg = 2308.11
# Perdas_Núcleo------------------------------------------------------------------------------------------------------
KH := 4*10^-5
KE := 4*10^-10
Pnucleo := (ΔBLo^2.4*(KH*Fs + KE*Fs^2)*Ve)
Pnucleo = 7.56315e-7
# Profundidade_Penetração------------------------------------------------------------------------------------------
Δpen := 7.5/sqrt(Fs)
Δpen = 0.0612372
# Diâmetro_Fio-------------------------------------------------------------------------------------------------------------
DFiomax := 2*Δpen
DFiomax = 0.122474
# Escolha_Fio_AWG-------------------------------------------------------------------------------------------------------------
Acu22 := 0.003255
ρ22 := 0.000530
S22 := 0.004013
# Escolha_Seção_Condutores--------------------------------------------------------------------------------------------------
SecaoCond := ILoef/JLo
SecaoCond = 0.533333
Nfios := SecaoCond/Acu22
Nfios = 163.85
# Calculo_Resistencia_fio--------------------------------------------------------------------------------------------------
lt := 6.7
Rfio := NumeroEspiras*(ρ22/Nfios)*lt
Rfio = 0.464404
# Perdas_Cobre--------------------------------------------------------------------------------------------------
Pcobre := Rfio*ILoef^2
Pcobre = 26749.7
# Perdas_Totais--------------------------------------------------------------------------------------------------
Ptotais := Pnucleo + Pcobre
# Elevacao_Temperatura--------------------------------------------------------------------------------------------------
Rt := 23*AeAw^-0.37
Rt = 0.593827
ΔT := Rt*Ptotais
ΔT = 15884.7
# Calculo_Fator_Ocupação----------------------------------------------------------------------------------------------
Awneces := (NumeroEspiras*Nfios*S22)/0.7
Awneces = 20128.5
Kocup := Awneces/Aw
Kocup = 23680.6
