# Conversor Boost
# Especificaçoes:
Vin := 12
Vout := 24.2
Iout := 0.3
Fs := 15000
DeltaI := 30 %
DeltaV := 2 %
# Calculos:
Pout := Iout*Vout
Pout = 7.26
Iin := Pout/Vin
Iin = 0.605
# Calculo de D (razão cíclica):
D := 1 - (1/(Vout/Vin))
D = 0.504132
# Carga Resistiva:
RL := Vout/Iout
RL = 80.6667
# Calculo do Indutor:
# Indutor construído de 2.388mH
L := Vin*D/(DeltaI*Iout*Fs)
L = 0.00448118
# Calculo do capacitor:
CA := Iout*D/(DeltaV*Vout*Fs)
CA = 2.08319e-5
# Projeto do Indutor
# MATHCAD
# Alunos: Dyego de Campos
# Gustavo Pereira de Souza
# Legenda:
# --------------------------------------------------
# N_esp = Número de espiras;
# Lo = Indutância desejada;
# lo = Comprimento do núcleo;
# Area = Área da seção reta do núcleo;
# μo = Permeabilidade magnética do núcleo.
# --------------------------------------------------
μo := 4*π*10^-7
d := 6*10^-3
N_esp := 3
lo := N_esp*0.8*10^-3
Area := (π*d^2)/4
Lo := (N_esp^2*μo*Area)/lo
Lo = 1.3324e-7
